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/batch
! ANSYS input file written by Workbench version 2019 R3
! File used for geometry attach: C:\Users\Rajatsurya\OneDrive\Documents\antenna booming mechanism fea analysis\assembled female lock for fea analysis.igs
/title,female lock fea analysis--Static Structural (A5)
/com,--- Data in consistent NMM units. See Solving Units in the help system for more information.
/units,MPA
/prep7
! Turn off shape checking because checks already performed inside WB mesher.
! See help system for more information.
SHPP,OFF,,NOWARN
etcon,set             ! allow ANSYS to choose best KEYOP's for 180x elements
/com,*********** Nodes for the whole assembly ***********
nblock,3,,5626
(1i9,3e20.9e3)
        1     2.437500000E+00     7.000000000E-01     6.666666667E-02
        2     2.437500000E+00     7.000000000E-01     1.333333333E-01
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-1
/com,*********** Elements for Body 1 "assembled female lock for fea analysis-FreeParts" ***********
et,1,186
keyo,1,2,1          ! set full integration on SOLID186
eblock,19,solid,,48
(19i9)
        1        1        1        1        0        0        0        0       20        0       49      358      458      445      440      385      459      444      442
      471      686      680      470      567      685      683      566      468      708      684      679
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-1
/com,*********** Elements for Body 2 "assembled female lock for fea analysis-FreeParts[2]" ***********
et,2,186
keyo,2,2,1          ! set full integration on SOLID186
eblock,19,solid,,48
(19i9)
        2        2        2        2        0        0        0        0       20        0     2019     4402     4496     4495     4490     4429     4503     4494     4493
     4515     4739     4733     4514     4611     4738     4736     4610     4512     4741     4737     4732
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-1
/com,*********** Elements for Body 3 "assembled female lock for fea analysis-FreeParts[3]" ***********
et,3,186
keyo,3,2,1          ! set full integration on SOLID186
eblock,19,solid,,48
(19i9)
        3        3        3        3        0        0        0        0       20        0     2067     4759     4859     4846     4841     4786     4860     4845     4843
     4872     5087     5081     4871     4968     5086     5084     4967     4869     5109     5085     5080
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-1
/com,*********** Elements for Body 4 "assembled female lock for fea analysis-FreeParts[4]" ***********
et,4,187
eblock,19,solid,,1922
(19i9)
        4        4        4        4        0        0        0        0       10        0       97     1052     1085     1086     1342     3412     3514     3413     3414
     3516     3517
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-1
/com,*********** Elements for Body 5 "assembled female lock for fea analysis-FreeParts|PartBody" ***********
et,5,186
keyo,5,2,1          ! set full integration on SOLID186
eblock,19,solid,,48
(19i9)
        5        5        5        5        0        0        0        0       20        0        1        1       95       94       89       28      102       93       92
      114      338      332      113      210      337      335      209      111      340      336      331
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-1
/com,*********** Send User Defined Coordinate System(s) ***********
csys,0
toffst,273.15,  ! Temperature offset from absolute zero
/com,*********** Set Reference Temperature ***********
tref,-271.1
/com,*********** Send Materials ***********
MP,DENS,1,2.68e-09,	! tonne mm^-3
MP,EX,1,73000,	! tonne s^-2 mm^-1
MP,NUXY,1,0.33,
MP,KXX,1,152,	! tonne mm s^-3 C^-1
MP,ALPX,1,2.15e-05,	! C^-1
MP,C,1,963000000,	! mm^2 s^-2 C^-1
MP,RSVX,1,4.4e-05,	! ohm mm

MP,DENS,2,2.68e-09,	! tonne mm^-3
MP,EX,2,73000,	! tonne s^-2 mm^-1
MP,NUXY,2,0.33,
MP,KXX,2,152,	! tonne mm s^-3 C^-1
MP,ALPX,2,2.15e-05,	! C^-1
MP,C,2,963000000,	! mm^2 s^-2 C^-1
MP,RSVX,2,4.4e-05,	! ohm mm

MP,DENS,3,2.68e-09,	! tonne mm^-3
MP,EX,3,73000,	! tonne s^-2 mm^-1
MP,NUXY,3,0.33,
MP,KXX,3,152,	! tonne mm s^-3 C^-1
MP,ALPX,3,2.15e-05,	! C^-1
MP,C,3,963000000,	! mm^2 s^-2 C^-1
MP,RSVX,3,4.4e-05,	! ohm mm

MP,DENS,4,2.68e-09,	! tonne mm^-3
MP,EX,4,73000,	! tonne s^-2 mm^-1
MP,NUXY,4,0.33,
MP,KXX,4,152,	! tonne mm s^-3 C^-1
MP,ALPX,4,2.15e-05,	! C^-1
MP,C,4,963000000,	! mm^2 s^-2 C^-1
MP,RSVX,4,4.4e-05,	! ohm mm

MP,DENS,5,2.68e-09,	! tonne mm^-3
MP,EX,5,73000,	! tonne s^-2 mm^-1
MP,NUXY,5,0.33,
MP,KXX,5,152,	! tonne mm s^-3 C^-1
MP,ALPX,5,2.15e-05,	! C^-1
MP,C,5,963000000,	! mm^2 s^-2 C^-1
MP,RSVX,5,4.4e-05,	! ohm mm

!************************* Model Summary ********************
!assembled female lock for fea analysis-FreeParts,	Aluminum alloy, cast,	matid,	1
!assembled female lock for fea analysis-FreeParts[2],	Aluminum alloy, cast,	matid,	2
!assembled female lock for fea analysis-FreeParts[3],	Aluminum alloy, cast,	matid,	3
!assembled female lock for fea analysis-FreeParts[4],	Aluminum alloy, cast,	matid,	4
!assembled female lock for fea analysis-FreeParts|PartBody,	Aluminum alloy, cast,	matid,	5
!************************* End Model Summary ********************
/com,*********** Create Contact "Contact Region" ***********
*set,tid,7
*set,cid,6
r,tid
r,cid
et,tid,170
et,cid,174
eblock,10,,,16
(15i9)
     3499        7        7        7        0      450      452      465      451      694      697      695      693
     3500        7        7        7        0      407      406      452      450      618      619      694      621
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-1
eblock,10,,,16
(15i9)
     3515        6        6        6        0      450      452      465      451      694      697      695      693
     3516        6        6        6        0      407      406      452      450      618      619      694      621
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-1
eblock,10,,,7
(15i9)
     3531        6        7        6        0      956      962     1184     1184     2760     2793     1184     2764
     3532        6        7        6        0     1184     1188     1191     1191     3930     3954     1191     3932
     3533        6        7        6        0      962     1117     1185     1185     2792     3615     1185     2794
     3534        6        7        6        0      953      962      956      956     2723     2760      956     2721
     3535        6        7        6        0      962     1185     1184     1184     2794     3929     1184     2793
     3536        6        7        6        0      956     1184     1191     1191     2764     3932     1191     2765
     3537        6        7        6        0      956     1191     1159     1159     2765     3798     1159     2763
-1
eblock,10,,,7
(15i9)
     3538        7        6        7        0      956      962     1184     1184     2760     2793     1184     2764
     3539        7        6        7        0     1184     1188     1191     1191     3930     3954     1191     3932
     3540        7        6        7        0      962     1117     1185     1185     2792     3615     1185     2794
     3541        7        6        7        0      953      962      956      956     2723     2760      956     2721
     3542        7        6        7        0      962     1185     1184     1184     2794     3929     1184     2793
     3543        7        6        7        0      956     1184     1191     1191     2764     3932     1191     2765
     3544        7        6        7        0      956     1191     1159     1159     2765     3798     1159     2763
-1
keyo,cid,8,2               ! auto create asymmetric contact (from Program Controlled setting)
keyo,cid,10,0              ! adjust contact stiffness each NR iteration (from Program Controlled setting)
keyo,cid,12,5              ! bonded always
keyo,cid,18,1              ! small sliding turned on by application
keyo,cid,2,0               ! augmented Lagrange (from Program Controlled setting)
keyo,cid,4,0               ! on Gauss point (from Program Controlled setting)
keyo,cid,9,1               ! ignore initial gaps/penetration
keyo,cid,7,0               ! No Prediction
rmod,tid,3,10.      ! FKN
rmod,tid,5,0.       ! ICONT
rmod,tid,6,0.       ! PINB
rmod,tid,10,0.      ! CNOF
rmod,tid,12,0.      ! FKT
rmod,tid,36,36      ! WB DSID
rmod,cid,3,10.      ! FKN
rmod,cid,5,0.       ! ICONT
rmod,cid,6,0.       ! PINB
rmod,cid,10,0.      ! CNOF
rmod,cid,12,0.      ! FKT
rmod,cid,36,36      ! WB DSID
/com,*********** Create Contact "Contact Region 2" ***********
*set,tid,9
*set,cid,8
r,tid
r,cid
et,tid,170
et,cid,174
eblock,10,,,16
(15i9)
     3545        9        9        9        0     4503     4496     4495     4494     4741     4739     4737     4738
     3546        9        9        9        0     4504     4497     4496     4503     4743     4740     4741     4753
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-1
eblock,10,,,16
(15i9)
     3561        8        8        8        0     4503     4496     4495     4494     4741     4739     4737     4738
     3562        8        8        8        0     4504     4497     4496     4503     4743     4740     4741     4753
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-1
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eblock,10,,,7
(15i9)
     3584        9        8        9        0     1012     1186     1148     1148     3171     3740     1148     3169
     3585        9        8        9        0     1012     1183     1186     1186     3170     3919     1186     3171
     3586        9        8        9        0     1183     1192     1187     1187     3922     3948     1187     3920
     3587        9        8        9        0     1012     1018     1183     1183     3168     3224     1183     3170
     3588        9        8        9        0     1012     1015     1018     1018     3167     3192     1018     3168
     3589        9        8        9        0     1018     1158     1192     1192     3223     3792     1192     3225
     3590        9        8        9        0     1018     1192     1183     1183     3225     3922     1183     3224
-1
keyo,cid,8,2               ! auto create asymmetric contact (from Program Controlled setting)
keyo,cid,10,0              ! adjust contact stiffness each NR iteration (from Program Controlled setting)
keyo,cid,12,5              ! bonded always
keyo,cid,18,1              ! small sliding turned on by application
keyo,cid,2,0               ! augmented Lagrange (from Program Controlled setting)
keyo,cid,4,0               ! on Gauss point (from Program Controlled setting)
keyo,cid,9,1               ! ignore initial gaps/penetration
keyo,cid,7,0               ! No Prediction
rmod,tid,3,10.      ! FKN
rmod,tid,5,0.       ! ICONT
rmod,tid,6,0.       ! PINB
rmod,tid,10,0.      ! CNOF
rmod,tid,12,0.      ! FKT
rmod,tid,36,39      ! WB DSID
rmod,cid,3,10.      ! FKN
rmod,cid,5,0.       ! ICONT
rmod,cid,6,0.       ! PINB
rmod,cid,10,0.      ! CNOF
rmod,cid,12,0.      ! FKT
rmod,cid,36,39      ! WB DSID
/com,*********** Create Contact "Contact Region 3" ***********
*set,tid,11
*set,cid,10
r,tid
r,cid
et,tid,170
et,cid,174
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eblock,10,,,7
(15i9)
     3630       11       10       11        0      999     1144     1186     1186     3083     3726     1186     3085
     3631       11       10       11        0      999     1186     1183     1183     3085     3919     1183     3084
     3632       11       10       11        0      990      993      999      999     3017     3038      999     3018
     3633       11       10       11        0      990      999     1183     1183     3018     3084     1183     3021
     3634       11       10       11        0     1183     1187     1189     1189     3920     3947     1189     3921
     3635       11       10       11        0      990     1183     1189     1189     3021     3921     1189     3022
     3636       11       10       11        0      990     1189     1131     1131     3022     3675     1131     3019
-1
keyo,cid,8,2               ! auto create asymmetric contact (from Program Controlled setting)
keyo,cid,10,0              ! adjust contact stiffness each NR iteration (from Program Controlled setting)
keyo,cid,12,5              ! bonded always
keyo,cid,18,1              ! small sliding turned on by application
keyo,cid,2,0               ! augmented Lagrange (from Program Controlled setting)
keyo,cid,4,0               ! on Gauss point (from Program Controlled setting)
keyo,cid,9,1               ! ignore initial gaps/penetration
keyo,cid,7,0               ! No Prediction
rmod,tid,3,10.      ! FKN
rmod,tid,5,0.       ! ICONT
rmod,tid,6,0.       ! PINB
rmod,tid,10,0.      ! CNOF
rmod,tid,12,0.      ! FKT
rmod,tid,36,42      ! WB DSID
rmod,cid,3,10.      ! FKN
rmod,cid,5,0.       ! ICONT
rmod,cid,6,0.       ! PINB
rmod,cid,10,0.      ! CNOF
rmod,cid,12,0.      ! FKT
rmod,cid,36,42      ! WB DSID
/com,*********** Create Contact "Contact Region 4" ***********
*set,tid,13
*set,cid,12
r,tid
r,cid
et,tid,170
et,cid,174
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eblock,10,,,16
(15i9)
     3667       13       12       13        0      102       95       94       93      340      338      336      337
     3668       13       12       13        0      103       96       95      102      342      339      340      352
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-1
keyo,cid,8,2               ! auto create asymmetric contact (from Program Controlled setting)
keyo,cid,10,0              ! adjust contact stiffness each NR iteration (from Program Controlled setting)
keyo,cid,12,5              ! bonded always
keyo,cid,18,1              ! small sliding turned on by application
keyo,cid,2,0               ! augmented Lagrange (from Program Controlled setting)
keyo,cid,4,0               ! on Gauss point (from Program Controlled setting)
keyo,cid,9,1               ! ignore initial gaps/penetration
keyo,cid,7,0               ! No Prediction
rmod,tid,3,10.      ! FKN
rmod,tid,5,0.       ! ICONT
rmod,tid,6,0.       ! PINB
rmod,tid,10,0.      ! CNOF
rmod,tid,12,0.      ! FKT
rmod,tid,36,45      ! WB DSID
rmod,cid,3,10.      ! FKN
rmod,cid,5,0.       ! ICONT
rmod,cid,6,0.       ! PINB
rmod,cid,10,0.      ! CNOF
rmod,cid,12,0.      ! FKT
rmod,cid,36,45      ! WB DSID
nsel,all
esel,all
/com,*********** Fixed Supports ***********
CMBLOCK,_FIXEDSU,NODE,      295
(8i10)
       715       718       719       720       721       722       735       737
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cmsel,s,_FIXEDSU
d,all,all
nsel,all
/com,*********** Define Force Using Surface Effect Elements ***********
local,12,0,0.,0.,0.,0.,0.,0.
csys,0
et,14,154
eblock,10,,,62
(15i9)
     3683       14       14       14       12     1004     1006     1013     1013     3117     3134     1013     3118
     3684       14       14       14       12     1025     1026     1188     1188     3272     3284     1188     3276
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-1
esel,s,type,,14
keyop,14,2,1                ! Apply load in local coordinate system
keyop,14,7,1                ! Use original area so load is constant in large deformation
keyop,14,11,2               ! Use real and not project area
esel,all
/com,*********** Define Force Using Surface Effect Elements ***********
local,13,0,0.,0.,0.,0.,0.,0.
csys,0
et,15,154
eblock,10,,,4
(15i9)
     3745       15       15       15       13      779      784      781      781     1719     1737      781     1718
     3746       15       15       15       13      784      783      781      781     1750     1736      781     1737
     3747       15       15       15       13      781      783      782      782     1736     1743      782     1735
     3748       15       15       15       13      782      783      780      780     1743     1727      780     1726
-1
esel,s,type,,15
keyop,15,2,1                ! Apply load in local coordinate system
keyop,15,7,1                ! Use original area so load is constant in large deformation
keyop,15,11,2               ! Use real and not project area
esel,all
/com,*********** Define Force Using Surface Effect Elements ***********
local,14,0,0.,0.,0.,0.,0.,0.
csys,0
et,16,154
eblock,10,,,4
(15i9)
     3749       16       16       16       14      785      790      787      787     1764     1781      787     1763
     3750       16       16       16       14      787      789      788      788     1780     1792      788     1779
     3751       16       16       16       14      788      789      786      786     1792     1772      786     1771
     3752       16       16       16       14      790      789      787      787     1798     1780      787     1781
-1
esel,s,type,,16
keyop,16,2,1                ! Apply load in local coordinate system
keyop,16,7,1                ! Use original area so load is constant in large deformation
keyop,16,11,2               ! Use real and not project area
esel,all
fini
/com,****************************************************************************
/com,*************************    SOLUTION       ********************************
/com,****************************************************************************
/solu
antype,0                   ! static analysis
_thickRatio=  0     ! Ratio of thick parts in the model
eqsl,sparse,,,,,1
cntr,print,1               ! print out contact info and also make no initial contact an error
dmpoption,emat,no             ! Don't combine emat file for DANSYS
dmpoption,esav,no             ! Don't combine esav file for DANSYS
nldiag,cont,iter           ! print out contact info each equilibrium iteration
rescontrol,,none                 ! Do not keep any restart files
/com,****************************************************
/com,******************* SOLVE FOR LS 1 OF 1 ****************
esel,s,type,,14
nsle
sfe,all,1,pres,1,0.
sfe,all,2,pres,1,0.
sfe,all,3,pres,1,-4.15385147876298
esel,s,type,,15
nsle
sfe,all,1,pres,1,0.
sfe,all,2,pres,1,0.
sfe,all,3,pres,1,-415.902985572323
esel,s,type,,16
nsle
sfe,all,1,pres,1,0.
sfe,all,2,pres,1,0.
sfe,all,3,pres,1,-415.902985572324
nsel,all
esel,all
nsub,1,1,1
time,1.
outres,erase
outres,all,none
outres,nsol,all,
outres,rsol,all
outres,eangl,all
outres,etmp,all
outres,veng,all
outres,strs,all,
outres,epel,all,
outres,eppl,all,
outres,cont,all,
! *********** WB SOLVE COMMAND ***********
! check interactive state
*get,ANSINTER_,active,,int
*if,ANSINTER_,ne,0,then
/eof
*endif
solve
/com *************** Write FE CONNECTORS *********
CEWRITE,file,ce,,INTE
/com,****************************************************
/com,*************** FINISHED SOLVE FOR LS 1 *************
/post1
fini
