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/batch
! ANSYS input file written by Workbench version 2019 R3
! File used for geometry attach: C:\Users\Rajatsurya\OneDrive\Documents\antenna booming mechanism fea analysis\frictional and pressure analysis on column blocking part and hub_files\dp0\SYS\DM\SYS.agdb
/title,frictional and pressure analysis on column blocking part and hub--Static Structural (A5)
/com,--- Data in consistent NMM units. See Solving Units in the help system for more information.
/units,MPA
/prep7
! Turn off shape checking because checks already performed inside WB mesher.
! See help system for more information.
SHPP,OFF,,NOWARN
etcon,set             ! allow ANSYS to choose best KEYOP's for 180x elements
/com,*********** Nodes for the whole assembly ***********
nblock,3,,10597
(1i9,3e20.9e3)
        1     3.859327232E+01     3.801248362E+01     1.960235493E+02
        2     3.019357923E+01     3.802264645E+01     1.960235493E+02
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-1
/com,*********** Elements for Body 1 "antenna hub" ***********
et,1,187
eblock,19,solid,,3426
(19i9)
        1        1        1        1        0        0        0        0       10        0     1052     3850     4143     4052     4100     8642     9417     8640     8641
     9605     9414
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-1
/com,*********** Elements for Body 2 "blocking part" ***********
et,2,186
keyo,2,2,1          ! set full integration on SOLID186
eblock,19,solid,,44
(19i9)
        2        2        2        2        0        0        0        0       20        0        1        4      106      107       12       21       69       70       13
      163      409      192      160      223      340      198      195      161      341      343      191
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-1
/com,*********** Elements for Body 3 "base with columns " ***********
et,3,187
eblock,19,solid,,1007
(19i9)
        3        3        3        3        0        0        0        0       10        0       45      635      942      636      987     2181     2191     2178     2183
     2967     2195
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-1
/com,*********** Send User Defined Coordinate System(s) ***********
csys,0
toffst,273.15,  ! Temperature offset from absolute zero
/com,*********** Set Reference Temperature ***********
tref,-271.1
/com,*********** Send Materials ***********
Temperature = 'TEMP' ! Temperature
MP,DENS,1,2.77e-09,	! tonne mm^-3
MP,ALPX,1,2.3e-05,	! C^-1
MP,C,1,875000000,	! mm^2 s^-2 C^-1
MPTEMP,,,,,,,,
MPTEMP,1,-100
MPTEMP,2,0
MPTEMP,3,100
MPTEMP,4,200
MPDATA,KXX,1, ,114,144,165,175,	! tonne mm s^-3 C^-1
MPTEMP,,,,,,,,
MPTEMP,,,,,,,,
MPTEMP,1,0
MPTEMP,2,20
MPTEMP,3,100
MPDATA,RSVX,1, ,2.43e-05,2.67e-05,3.63e-05,	! ohm mm
MPTEMP,,,,,,,,
MP,EX,1,71000,	! tonne s^-2 mm^-1
MP,NUXY,1,0.33,
MP,MURX,1,1,

Temperature = 'TEMP' ! Temperature
MP,DENS,2,2.77e-09,	! tonne mm^-3
MP,ALPX,2,2.3e-05,	! C^-1
MP,C,2,875000000,	! mm^2 s^-2 C^-1
MPTEMP,,,,,,,,
MPTEMP,1,-100
MPTEMP,2,0
MPTEMP,3,100
MPTEMP,4,200
MPDATA,KXX,2, ,114,144,165,175,	! tonne mm s^-3 C^-1
MPTEMP,,,,,,,,
MPTEMP,,,,,,,,
MPTEMP,1,0
MPTEMP,2,20
MPTEMP,3,100
MPDATA,RSVX,2, ,2.43e-05,2.67e-05,3.63e-05,	! ohm mm
MPTEMP,,,,,,,,
MP,EX,2,71000,	! tonne s^-2 mm^-1
MP,NUXY,2,0.33,
MP,MURX,2,1,

Temperature = 'TEMP' ! Temperature
MP,DENS,3,2.77e-09,	! tonne mm^-3
MP,ALPX,3,2.3e-05,	! C^-1
MP,C,3,875000000,	! mm^2 s^-2 C^-1
MPTEMP,,,,,,,,
MPTEMP,1,-100
MPTEMP,2,0
MPTEMP,3,100
MPTEMP,4,200
MPDATA,KXX,3, ,114,144,165,175,	! tonne mm s^-3 C^-1
MPTEMP,,,,,,,,
MPTEMP,,,,,,,,
MPTEMP,1,0
MPTEMP,2,20
MPTEMP,3,100
MPDATA,RSVX,3, ,2.43e-05,2.67e-05,3.63e-05,	! ohm mm
MPTEMP,,,,,,,,
MP,EX,3,71000,	! tonne s^-2 mm^-1
MP,NUXY,3,0.33,
MP,MURX,3,1,

!************************* Model Summary ********************
!antenna hub,	Aluminum Alloy,	matid,	1
!blocking part,	Aluminum Alloy,	matid,	2
!base with columns ,	Aluminum Alloy,	matid,	3
!************************* End Model Summary ********************
/com,*********** Create Contact "Bonded - antenna hub To blocking part" ***********
*set,tid,5
*set,cid,4
r,tid
r,cid
et,tid,170
et,cid,174
eblock,10,,,118
(15i9)
     7548        5        5        5        0     3262     3265     3329     3329     5680     5699     3329     5682
     7549        5        5        5        0     3255     3346     3256     3256     5616     5627     3256     5614
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-1
eblock,10,,,118
(15i9)
     7666        4        4        4        0     3262     3265     3329     3329     5680     5699     3329     5682
     7667        4        4        4        0     3255     3346     3256     3256     5616     5627     3256     5614
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-1
eblock,10,,,44
(15i9)
     7784        4        5        4        0        6        3        9        9      154      155        9      171
     7785        4        5        4        0        7        5        8        8      165      166        8      175
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-1
eblock,10,,,44
(15i9)
     7828        5        4        5        0        6        3        9        9      154      155        9      171
     7829        5        4        5        0        7        5        8        8      165      166        8      175
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-1
keyo,cid,8,2               ! auto create asymmetric contact (from Program Controlled setting)
keyo,cid,10,0              ! adjust contact stiffness each NR iteration (from Program Controlled setting)
keyo,cid,12,5              ! bonded always
keyo,cid,18,1              ! small sliding turned on by application
keyo,cid,2,0               ! augmented Lagrange (from Program Controlled setting)
keyo,cid,4,0               ! on Gauss point (from Program Controlled setting)
keyo,cid,9,1               ! ignore initial gaps/penetration
keyo,cid,7,0               ! No Prediction
rmod,tid,3,10.      ! FKN
rmod,tid,5,0.       ! ICONT
rmod,tid,6,0.       ! PINB
rmod,tid,10,0.      ! CNOF
rmod,tid,12,0.      ! FKT
rmod,tid,36,30      ! WB DSID
rmod,cid,3,10.      ! FKN
rmod,cid,5,0.       ! ICONT
rmod,cid,6,0.       ! PINB
rmod,cid,10,0.      ! CNOF
rmod,cid,12,0.      ! FKT
rmod,cid,36,30      ! WB DSID
/com,*********** Create Contact "No Separation - antenna hub To base with columns " ***********
*set,tid,7
*set,cid,6
r,tid
r,cid
et,tid,170
et,cid,174
eblock,10,,,256
(15i9)
     7872        7        7        7        0     3630     3948     3950     3950     7426     8940     3950     7427
     7873        7        7        7        0     3629     3630     3950     3950     7416     7427     3950     7421
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-1
eblock,10,,,256
(15i9)
     8128        6        6        6        0     3630     3948     3950     3950     7426     8940     3950     7427
     8129        6        6        6        0     3629     3630     3950     3950     7416     7427     3950     7421
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-1
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eblock,10,,,208
(15i9)
     8592        7        6        7        0      675      835      676      676     2458     2463      676     2454
     8593        7        6        7        0      490      814      491      491     1233     1236      491     1231
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-1
keyo,cid,8,2               ! auto create asymmetric contact (from Program Controlled setting)
keyo,cid,10,0              ! adjust contact stiffness each NR iteration (from Program Controlled setting)
keyo,cid,12,4              ! no separation always
keyo,cid,18,1              ! small sliding turned on by application
keyo,cid,2,0               ! augmented Lagrange (from Program Controlled setting)
keyo,cid,4,0               ! on Gauss point (from Program Controlled setting)
keyo,cid,9,1               ! ignore initial gaps/penetration
keyo,cid,7,0               ! No Prediction
rmod,tid,3,10.      ! FKN
rmod,tid,5,0.       ! ICONT
rmod,tid,6,0.       ! PINB
rmod,tid,10,0.      ! CNOF
rmod,tid,12,0.      ! FKT
rmod,tid,36,33      ! WB DSID
rmod,cid,3,10.      ! FKN
rmod,cid,5,0.       ! ICONT
rmod,cid,6,0.       ! PINB
rmod,cid,10,0.      ! CNOF
rmod,cid,12,0.      ! FKT
rmod,cid,36,33      ! WB DSID
/com,*********** Create Contact "Bonded - blocking part To base with columns " ***********
*set,tid,9
*set,cid,8
r,tid
r,cid
et,tid,170
et,cid,174
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eblock,10,,,24
(15i9)
     8856        9        8        9        0      484      480      483      483     1189     1188      483     1200
     8857        9        8        9        0      482      483      481      481     1197     1194      481     1193
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-1
keyo,cid,8,2               ! auto create asymmetric contact (from Program Controlled setting)
keyo,cid,10,0              ! adjust contact stiffness each NR iteration (from Program Controlled setting)
keyo,cid,12,5              ! bonded always
keyo,cid,18,1              ! small sliding turned on by application
keyo,cid,2,0               ! augmented Lagrange (from Program Controlled setting)
keyo,cid,4,0               ! on Gauss point (from Program Controlled setting)
keyo,cid,9,1               ! ignore initial gaps/penetration
keyo,cid,7,0               ! No Prediction
rmod,tid,3,10.      ! FKN
rmod,tid,5,0.       ! ICONT
rmod,tid,6,0.       ! PINB
rmod,tid,10,0.      ! CNOF
rmod,tid,12,0.      ! FKT
rmod,tid,36,36      ! WB DSID
rmod,cid,3,10.      ! FKN
rmod,cid,5,0.       ! ICONT
rmod,cid,6,0.       ! PINB
rmod,cid,10,0.      ! CNOF
rmod,cid,12,0.      ! FKT
rmod,cid,36,36      ! WB DSID
nsel,all
esel,all
/com,*********** Fixed Supports ***********
CMBLOCK,_FIXEDSU,NODE,     2326
(8i10)
        13        14        15        16        17        18        19        20
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cmsel,s,_FIXEDSU
d,all,all
nsel,all
/com,*********** Define Force Using Surface Effect Elements ***********
local,12,0,0.,0.,0.,0.,0.,0.
csys,0
et,10,154
eblock,10,,,148
(15i9)
     8880       10       10       10       12        6        3        9        9      154      155        9      171
     8881       10       10       10       12        7        5        8        8      165      166        8      175
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-1
esel,s,type,,10
keyop,10,2,1                ! Apply load in local coordinate system
keyop,10,7,1                ! Use original area so load is constant in large deformation
keyop,10,11,2               ! Use real and not project area
esel,all
/com,*********** Define Force Using Surface Effect Elements ***********
local,13,0,0.,0.,0.,0.,0.,0.
csys,0
et,11,154
eblock,10,,,468
(15i9)
     9028       11       11       11       13     3401     3402     3332     3332     6447     6106     3332     6105
     9029       11       11       11       13     3335     3404     3664     3664     6115     6457     3664     6116
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-1
esel,s,type,,11
keyop,11,2,1                ! Apply load in local coordinate system
keyop,11,7,1                ! Use original area so load is constant in large deformation
keyop,11,11,2               ! Use real and not project area
esel,all
fini
/com,****************************************************************************
/com,*************************    SOLUTION       ********************************
/com,****************************************************************************
/solu
antype,0                   ! static analysis
_thickRatio=0.333   ! Ratio of thick parts in the model
eqsl,sparse,,,,,1
cntr,print,1               ! print out contact info and also make no initial contact an error
dmpoption,emat,no             ! Don't combine emat file for DANSYS
dmpoption,esav,no             ! Don't combine esav file for DANSYS
nldiag,cont,iter           ! print out contact info each equilibrium iteration
rescontrol,,none                 ! Do not keep any restart files
/com,****************************************************
/com,******************* SOLVE FOR LS 1 OF 1 ****************
esel,s,type,,10
nsle
sfe,all,1,pres,1,0.
sfe,all,2,pres,1,0.
sfe,all,3,pres,1,2.98643115056755e-002
esel,s,type,,11
nsle
sfe,all,1,pres,1,0.
sfe,all,2,pres,1,0.
sfe,all,3,pres,1,-1.84483443264328e-002
nsel,all
esel,all
nsub,1,1,1
time,1.
outres,erase
outres,all,none
outres,nsol,all,
outres,rsol,all
outres,eangl,all
outres,etmp,all
outres,veng,all
outres,strs,all,
outres,epel,all,
outres,eppl,all,
outres,cont,all,
! *********** WB SOLVE COMMAND ***********
! check interactive state
*get,ANSINTER_,active,,int
*if,ANSINTER_,ne,0,then
/eof
*endif
solve
/com *************** Write FE CONNECTORS *********
CEWRITE,file,ce,,INTE
/com,****************************************************
/com,*************** FINISHED SOLVE FOR LS 1 *************
/post1
fini
