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/batch
! ANSYS input file written by Workbench version 2019 R3
! File used for geometry attach: C:\Users\Rajatsurya\OneDrive\Documents\antenna booming mechanism fea analysis\assembled male lock for fea anlysis.igs
/title,male lock fea analysis--Static Structural (A5)
/com,--- Data in consistent NMM units. See Solving Units in the help system for more information.
/units,MPA
/prep7
! Turn off shape checking because checks already performed inside WB mesher.
! See help system for more information.
SHPP,OFF,,NOWARN
etcon,set             ! allow ANSYS to choose best KEYOP's for 180x elements
/com,*********** Nodes for the whole assembly ***********
nblock,3,,2179
(1i9,3e20.9e3)
        1     7.500148099E-01     3.620519419E-05     9.207014790E+00
        2    -7.499851901E-01     3.620519419E-05     9.207014790E+00
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-1
/com,*********** Elements for Body 1 "locking mechanism|PartBody" ***********
et,1,187
eblock,19,solid,,970
(19i9)
        1        1        1        1        0        0        0        0       10        0        1      128      148      351      144     1109     1227     1110     1108
     1208     1211
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-1
/com,*********** Send User Defined Coordinate System(s) ***********
csys,0
toffst,273.15,  ! Temperature offset from absolute zero
/com,*********** Set Reference Temperature ***********
tref,-271.1
/com,*********** Send Materials ***********
MP,DENS,1,2.68e-09,	! tonne mm^-3
MP,EX,1,73000,	! tonne s^-2 mm^-1
MP,NUXY,1,0.33,
MP,KXX,1,152,	! tonne mm s^-3 C^-1
MP,ALPX,1,2.15e-05,	! C^-1
MP,C,1,963000000,	! mm^2 s^-2 C^-1
MP,RSVX,1,4.4e-05,	! ohm mm

!************************* Model Summary ********************
!locking mechanism|PartBody,	Aluminum alloy, cast,	matid,	1
!************************* End Model Summary ********************
/com,*********** Fixed Supports ***********
CMBLOCK,_FIXEDSU,NODE,      257
(8i10)
       115       117       118       124       126       127       134       136
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cmsel,s,_FIXEDSU
d,all,all
nsel,all
/com,*********** Define Force Using Surface Effect Elements ***********
local,12,0,0.,0.,0.,0.,0.,0.
csys,0
et,2,154
eblock,10,,,150
(15i9)
     1583        2        2        2       12      112      146      114      114      998     1009      114      993
     1584        2        2        2       12      112      145      146      146      997     1212      146      998
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-1
esel,s,type,,2
keyop,2,2,1                ! Apply load in local coordinate system
keyop,2,7,1                ! Use original area so load is constant in large deformation
keyop,2,11,2               ! Use real and not project area
esel,all
/com,*********** Define Force Using Surface Effect Elements ***********
local,13,0,0.,0.,0.,0.,0.,0.
csys,0
et,3,154
eblock,10,,,32
(15i9)
     1733        3        3        3       13        3        6        4        4      369      377        4      368
     1734        3        3        3       13        4        6        5        5      377      382        5      376
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-1
esel,s,type,,3
keyop,3,2,1                ! Apply load in local coordinate system
keyop,3,7,1                ! Use original area so load is constant in large deformation
keyop,3,11,2               ! Use real and not project area
esel,all
/com,*********** Define Force Using Surface Effect Elements ***********
local,14,0,0.,0.,0.,0.,0.,0.
csys,0
et,4,154
eblock,10,,,4
(15i9)
     1765        4        4        4       14       50       51       48       48      587      580       48      579
     1766        4        4        4       14       49       51       50       50      584      587       50      583
     1767        4        4        4       14       47       51       49       49      576      584       49      575
     1768        4        4        4       14       52       51       47       47      591      576       47      577
-1
esel,s,type,,4
keyop,4,2,1                ! Apply load in local coordinate system
keyop,4,7,1                ! Use original area so load is constant in large deformation
keyop,4,11,2               ! Use real and not project area
esel,all
/com,*********** Define Force Using Surface Effect Elements ***********
local,15,0,0.,0.,0.,0.,0.,0.
csys,0
et,5,154
eblock,10,,,4
(15i9)
     1769        5        5        5       15       25       27       24       24      486      483       24      481
     1770        5        5        5       15       28       27       25       25      493      486       25      487
     1771        5        5        5       15       23       28       25       25      479      487       25      478
     1772        5        5        5       15       25       24       26       26      481      482       26      485
-1
esel,s,type,,5
keyop,5,2,1                ! Apply load in local coordinate system
keyop,5,7,1                ! Use original area so load is constant in large deformation
keyop,5,11,2               ! Use real and not project area
esel,all
fini
/com,****************************************************************************
/com,*************************    SOLUTION       ********************************
/com,****************************************************************************
/solu
antype,0                   ! static analysis
_thickRatio=  0     ! Ratio of thick parts in the model
eqsl,sparse,,,,,1
cntr,print,1               ! print out contact info and also make no initial contact an error
dmpoption,emat,no             ! Don't combine emat file for DANSYS
dmpoption,esav,no             ! Don't combine esav file for DANSYS
nldiag,cont,iter           ! print out contact info each equilibrium iteration
rescontrol,,none                 ! Do not keep any restart files
/com,****************************************************
/com,******************* SOLVE FOR LS 1 OF 1 ****************
esel,s,type,,2
nsle
sfe,all,1,pres,1,0.
sfe,all,2,pres,1,0.
sfe,all,3,pres,1,-1.2018806395662
esel,s,type,,3
nsle
sfe,all,1,pres,1,0.
sfe,all,2,pres,1,0.
sfe,all,3,pres,1,-8.09934022168354
esel,s,type,,4
nsle
sfe,all,1,pres,1,0.
sfe,all,2,pres,1,0.
sfe,all,3,pres,1,-415.902985572323
esel,s,type,,5
nsle
sfe,all,1,pres,1,0.
sfe,all,2,pres,1,0.
sfe,all,3,pres,1,-414.892817363521
nsel,all
esel,all
nsub,1,1,1
time,1.
outres,erase
outres,all,none
outres,nsol,all,
outres,rsol,all
outres,eangl,all
outres,etmp,all
outres,veng,all
outres,strs,all,
outres,epel,all,
outres,eppl,all,
outres,cont,all,
! *********** WB SOLVE COMMAND ***********
! check interactive state
*get,ANSINTER_,active,,int
*if,ANSINTER_,ne,0,then
/eof
*endif
solve
/com *************** Write FE CONNECTORS *********
CEWRITE,file,ce,,INTE
/com,****************************************************
/com,*************** FINISHED SOLVE FOR LS 1 *************
/post1
fini
