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/batch
! ANSYS input file written by Workbench version 2019 R3
! File used for geometry attach: C:\Users\Rajatsurya\OneDrive\Documents\antenna booming mechanism fea analysis\spring design 1 fea analysis_files\dp0\SYS\DM\SYS.agdb
/title,spring design 1 fea analysis--Static Structural (A5)
/com,--- Data in consistent NMM units. See Solving Units in the help system for more information.
/units,MPA
/prep7
! Turn off shape checking because checks already performed inside WB mesher.
! See help system for more information.
SHPP,OFF,,NOWARN
etcon,set             ! allow ANSYS to choose best KEYOP's for 180x elements
/com,*********** Nodes for the whole assembly ***********
nblock,3,,22937
(1i9,3e20.9e3)
        1     5.071121791E+00    -4.364609983E-01     2.307287656E+02
        2     5.097225235E+00     7.719675602E-02     2.306744163E+02
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-1
/com,*********** Elements for Body 1 "PartBody" ***********
et,1,187
eblock,19,solid,,7633
(19i9)
        1        1        1        1        0        0        0        0       10        0        1     1650     2170     1652     2168    14875    14885    14872    14873
    17138    14884
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-1
/com,*********** Send User Defined Coordinate System(s) ***********
csys,0
toffst,273.15,  ! Temperature offset from absolute zero
/com,*********** Set Reference Temperature ***********
tref,-271.1
/com,*********** Send Materials ***********
Temperature = 'TEMP' ! Temperature
MP,DENS,1,8.3e-09,	! tonne mm^-3
MP,ALPX,1,1.8e-05,	! C^-1
MP,C,1,385000000,	! mm^2 s^-2 C^-1
MP,KXX,1,401,	! tonne mm s^-3 C^-1
MPTEMP,,,,,,,,
MPTEMP,1,0
MPTEMP,2,20
MPTEMP,3,100
MPDATA,RSVX,1, ,1.548e-05,1.694e-05,2.277e-05,	! ohm mm
MPTEMP,,,,,,,,
MP,EX,1,110000,	! tonne s^-2 mm^-1
MP,NUXY,1,0.34,
MP,MURX,1,1,

!************************* Model Summary ********************
!PartBody,	Copper Alloy,	matid,	1
!************************* End Model Summary ********************
/com,*********** Fixed Supports ***********
CMBLOCK,_FIXEDSU,NODE,      276
(8i10)
         2         3         4         5        13        14        15        16
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cmsel,s,_FIXEDSU
d,all,all
nsel,all
/com,******* Constant Zero Displacement X *******
CMBLOCK,_DISPZEROUX,NODE,      157
(8i10)
      1562      1566      1567      1568      1574      1575      1576      1577
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cmsel,s,_DISPZEROUX
d,all,ux,0
nsel,all
/com,******* Constant Zero Displacement Y *******
CMBLOCK,_DISPZEROUY,NODE,      157
(8i10)
      1562      1566      1567      1568      1574      1575      1576      1577
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cmsel,s,_DISPZEROUY
d,all,uy,0
nsel,all
fini
/com,****************************************************************************
/com,*************************    SOLUTION       ********************************
/com,****************************************************************************
/solu
antype,0                   ! static analysis
_thickRatio=  0     ! Ratio of thick parts in the model
eqsl,sparse,,,,,1
cntr,print,1               ! print out contact info and also make no initial contact an error
dmpoption,emat,no             ! Don't combine emat file for DANSYS
dmpoption,esav,no             ! Don't combine esav file for DANSYS
nldiag,cont,iter           ! print out contact info each equilibrium iteration
rescontrol,,none                 ! Do not keep any restart files
/com,****************************************************
/com,******************* SOLVE FOR LS 1 OF 1 ****************
/com,*** Set Displacements ***
CMBLOCK,_CM36UZ_ZP,NODE,      157
(8i10)
      1562      1566      1567      1568      1574      1575      1576      1577
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cmsel,s,_CM36UZ_ZP
d,all,uz,205.
nsel,all

/com,*** Component For All Non-Zero UZ Displacements ***
cmsel,s,_CM36uz_zp
cm,_DISPNONZEROUZ,NODE
nsel,all

nsub,1,1,1
time,1.
outres,erase
outres,all,none
outres,nsol,all,
outres,rsol,all
outres,eangl,all
outres,etmp,all
outres,veng,all
outres,strs,all,
outres,epel,all,
outres,eppl,all,
outres,cont,all,
! *********** WB SOLVE COMMAND ***********
! check interactive state
*get,ANSINTER_,active,,int
*if,ANSINTER_,ne,0,then
/eof
*endif
solve
/com *************** Write FE CONNECTORS *********
CEWRITE,file,ce,,INTE
/com,****************************************************
/com,*************** FINISHED SOLVE FOR LS 1 *************
/post1
fini
