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/batch
! ANSYS input file written by Workbench version 2019 R3
! File used for geometry attach: C:\Users\Rajatsurya\OneDrive\Documents\antenna booming mechanism fea analysis\torsion spring 2.igs
/title,torsion spring analysis--Static Structural (A5)
/com,--- Data in consistent NMM units. See Solving Units in the help system for more information.
/units,MPA
/prep7
! Turn off shape checking because checks already performed inside WB mesher.
! See help system for more information.
SHPP,OFF,,NOWARN
etcon,set             ! allow ANSYS to choose best KEYOP's for 180x elements
/com,*********** Nodes for the whole assembly ***********
nblock,3,,16277
(1i9,3e20.9e3)
        1     1.161825565E+01     3.802184414E+00     4.321082393E-02
        2     1.161825565E+01     3.802184414E+00    -1.495678918E+01
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-1
/com,*********** Nodes for all Remote Points ***********
nblock,3
(1i9,3e20.9e3)
    14799    -2.576865006E-01    -7.670770447E+00     3.556557349E+00
-1
/com,*********** Elements for Body 1 "torsion spring 2-FreeParts|PartBody" ***********
et,1,181
keyo,1,3,2
eblock,19,solid,,14918
(19i9)
        1        1        1        1        0        0        0        0        4        0        1    14722    14724    14692    14692
        1        1        1        1        0        0        0        0        4        0        2    14471    14470    14514    14514
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-1
/com,*********** Send User Defined Coordinate System(s) ***********
csys,0
toffst,273.15,  ! Temperature offset from absolute zero
/com,*********** Set Reference Temperature ***********
tref,-271.1
/com,*********** Send Materials ***********
Temperature = 'TEMP' ! Temperature
MP,DENS,1,8.3e-09,	! tonne mm^-3
MP,ALPX,1,1.8e-05,	! C^-1
MP,C,1,385000000,	! mm^2 s^-2 C^-1
MP,KXX,1,401,	! tonne mm s^-3 C^-1
MPTEMP,,,,,,,,
MPTEMP,1,0
MPTEMP,2,20
MPTEMP,3,100
MPDATA,RSVX,1, ,1.548e-05,1.694e-05,2.277e-05,	! ohm mm
MPTEMP,,,,,,,,
MP,EX,1,110000,	! tonne s^-2 mm^-1
MP,NUXY,1,0.34,
MP,MURX,1,1,

/com,*********** Send Sheet Properties ***********
sectype,1,shell
secdata,0.56
secoff,mid

!************************* Model Summary ********************
!torsion spring 2-FreeParts|PartBody,	Copper Alloy,	matid,	1
!************************* End Model Summary ********************
/com,*********** Fixed Supports ***********
CMBLOCK,_FIXEDSU,NODE,     1025
(8i10)
         1         2         3         4         5         6         7         8
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cmsel,s,_FIXEDSU
d,all,all
nsel,all
/com,*********** Create Remote Point "Internal Remote Point" ***********
! -------- Remote Point Used by "Moment" --------
*set,tid,3
*set,cid,2
et,cid,174
et,tid,170
keyo,tid,2,1               ! Don't fix the pilot node
keyo,tid,4,111111
keyo,cid,12,5              ! Bonded Contact
keyo,cid,4,1               ! Deformable RBE3 style load
keyo,cid,2,2               ! MPC style contact
eblock,10,,,993
(15i9)
    14920        2        2        2        0     5190     5187     5191     5191
    14921        2        2        2        0     5197     5185     5466     5466
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-1
*set,_npilot,14799
_npilot30=_npilot
type,tid
mat ,cid
real,cid
tshape,pilo
en,15913,_npilot
tshape
/com,*********** Construct Moment Using Remote Attachment ***********
fini
/com,****************************************************************************
/com,*************************    SOLUTION       ********************************
/com,****************************************************************************
/solu
antype,0                   ! static analysis
_thickRatio=  0     ! Ratio of thick parts in the model
eqsl,sparse,,,,,1
cntr,print,1               ! print out contact info and also make no initial contact an error
dmpoption,emat,no             ! Don't combine emat file for DANSYS
dmpoption,esav,no             ! Don't combine esav file for DANSYS
nldiag,cont,iter           ! print out contact info each equilibrium iteration
rescontrol,,none                 ! Do not keep any restart files
/com,****************************************************
/com,******************* SOLVE FOR LS 1 OF 1 ****************
nsel,s,node,,14799
f,all,mx,131.
f,all,my,0.
f,all,mz,0.
nsel,all
nsub,1,1,1
time,1.
outres,erase
outres,all,none
outres,nsol,all,
outres,rsol,all
outres,eangl,all
outres,etmp,all
outres,veng,all
outres,strs,all,
outres,epel,all,
outres,eppl,all,
outres,cont,all,
! *********** WB SOLVE COMMAND ***********
! check interactive state
*get,ANSINTER_,active,,int
*if,ANSINTER_,ne,0,then
/eof
*endif
solve
/com *************** Write FE CONNECTORS *********
CEWRITE,file,ce,,INTE
/com,****************************************************
/com,*************** FINISHED SOLVE FOR LS 1 *************
/post1
fini
